pos := 0, 1 .. 31
offset(pos) := (pos + 2)*(pos + 2)/10
offset(31) = 108.9
offset(31)*19000/128 = 16164.8
round(offset(pos))*19000/128 = [
    0; 148.438; 296.875; 445.312; 593.75; 742.188; 890.625; 1187.5; 1484.38; 1781.25
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]
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round(offset(pos)) = [
    0; 1; 2; 3; 4; 5; 6; 8; 10; 12
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]
pos := 0, 1 .. 64
round(pos)*4000/64 = [
    0; 62.5; 125; 187.5; 250; 312.5; 375; 437.5; 500; 562.5
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]
pos = [
    0; 1; 2; 3; 4; 5; 6; 7; 8; 9
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]
